*HEADING
One C3D4 tetrahedron. Elastic demonstration only, no composite physics.
*NODE
1,0.,0.,0.
2,1.,0.,0.
3,0.,1.,0.
4,0.,0.,1.
*ELEMENT, TYPE=C3D4, ELSET=VOL
1,1,2,3,4
*MATERIAL, NAME=MAT
*ELASTIC
70000.,0.3
*SOLID SECTION, ELSET=VOL, MATERIAL=MAT
*BOUNDARY
1,1,3
2,1,3
3,1,3
*STEP
*STATIC
*CLOAD
4,3,-100.
*NODE FILE
U
*EL FILE
S,E
*END STEP
